# OpenSim document version 40000
MarkerSet:
  Marker L_HEAD: torso (0.033 0.57 -0.066)
    # Left head over left ear
  Marker R_HEAD: torso (0.033 0.57 0.066)
    # Right head over right ear
  Marker SGL: torso (0.09 0.59 0)
    # Mid head
  Marker CV7: torso (-0.07 0.415 0)
    # 7th cervical certebrae
  Marker L_SIA: ground (-0.2 1.31 -0.08)
  Marker R_SIA: ground (-0.2 1.31 0.08)
  Marker TV10: torso (-0.093 0.167 0)
    # 10th thoracic vertebrae
  Marker L_SAE: torso (-0.03 0.44 -0.15)
    # Left shoulder
  Marker R_SAE: torso (-0.03 0.44 0.15)
    # Right shoulder
  Marker L_IAS: pelvis (0.02 0.03 -0.128)
    # Left anterior superior iliac spine
  Marker R_IAS: pelvis (0.02 0.03 0.128)
    # Right anterior superior iliac spine
  Marker L_IPS: pelvis (-0.156 0.04 -0.052)
    # Left posterior superior iliac spine
  Marker R_IPS: pelvis (-0.156 0.04 0.052)
    # Right posterior superior iliac spine
  Marker L_TH1: femur_l (0.0515 -0.215 -0.06)
    # Left thigh cluster marker 1
  Marker L_TH2: femur_l (-0.0075 -0.215 -0.06)
    # Left thigh cluster marker 1
  Marker L_TH3: femur_l (-0.0075 -0.3 -0.06)
    # Left thigh cluster marker 1
  Marker L_TH4: femur_l (0.0515 -0.3 -0.06)
    # Left thigh cluster marker 1
  Marker L_FLE: femur_l (0 -0.404 -0.05)
    # Left femur lateral epicondyle
  Marker L_FME: femur_l (0 -0.404 0.05)
    # Left femur medial epicondyle
  Marker L_SK1: tibia_l (0.046 -0.235 -0.05)
    # Left shank cluster marker 1
  Marker L_SK2: tibia_l (-0.013 -0.235 -0.05)
    # Left shank cluster marker 2
  Marker L_SK4: tibia_l (0.046 -0.32 -0.05)
    # Left shank cluster marker 3
  Marker L_SK3: tibia_l (-0.013 -0.32 -0.05)
    # Left shank cluster marker 4
  Marker L_FAL: tibia_l (-0.005 -0.41 -0.053)
    # Left lateral prominence of the lateral malleolus
  Marker L_TAM: tibia_l (0.006 -0.3888 0.038)
    # Left medial prominence of the medial malleolus
  Marker L_FCC: calcn_l (-0.02 0.02 0.005)
    # Aspect of the left Achilles tendon insertion on the calcaneus
  Marker L_FM1: calcn_l (0.19 0.013 0.035)
  Marker L_FM2: calcn_l (0.176 0.012 -0.0025)
  Marker L_FM5: calcn_l (0.142 0.012 -0.045)
  Marker R_TH1: femur_r (-0.0075 -0.215 0.06)
    # Right thigh cluster marker 1
  Marker R_TH2: femur_r (0.0515 -0.215 0.06)
    # Right thigh cluster marker 2
  Marker R_TH3: femur_r (0.0515 -0.3 0.06)
    # Right thigh cluster marker 3
  Marker R_TH4: femur_r (-0.0075 -0.3 0.06)
    # Right thigh cluster marker 4
  Marker R_FLE: femur_r (0 -0.404 0.05)
    # Right femur lateral epicondyle
  Marker R_FME: femur_r (0 -0.404 -0.05)
    # Right femur medial epicondyle
  Marker R_SK1: tibia_r (-0.013 -0.235 0.05)
    # Right shank cluster marker 1
  Marker R_SK2: tibia_r (0.046 -0.235 0.05)
    # Right shank cluster marker 2
  Marker R_SK3: tibia_r (0.046 -0.32 0.05)
    # Right shank cluster marker 3
  Marker R_SK4: tibia_r (-0.013 -0.32 0.05)
    # Right shank cluster marker 4
  Marker R_FAL: tibia_r (-0.005 -0.41 0.053)
    # Right lateral prominence of the lateral malleolus
  Marker R_TAM: tibia_r (0.006 -0.3888 -0.038)
    # Right medial prominence of the medial malleolus
  Marker R_FCC: calcn_r (-0.02 0.02 -0.005)
    # Aspect of the right Achilles tendon insertion on the calcaneus
  Marker R_FM1: calcn_r (0.19 0.013 -0.035)
    # Dorsal margin of the right first metatarsal head
  Marker R_FM2: calcn_r (0.176 0.012 0.0025)
    # Dorsal margin of the right second metatarsal head
  Marker R_FM5: calcn_r (0.142 0.012 0.045)
    # Dorsal margin of the right fifth metatarsal head
