# OpenSim document version 40000
MarkerSet:
  Marker L_HEAD: torso (0.033 0.57 -0.066)
    # Left head over left ear
  Marker R_HEAD: torso (0.033 0.57 0.066)
    # Right head over right ear
  Marker SGL: torso (0.09 0.59 0)
    # Mid head
  Marker SJN: torso (0.05 0.372 0)
    # Sternum jungular notch
  Marker SXS: torso (0.095 0.23 0)
    # Sternum xiphisternal joint
  Marker CV7: torso (-0.07 0.415 0)
    # 7th cervical certebrae
  Marker TV2: ground (-0.18 1.4 0)
    # 2th thoracic certebrae
  Marker MAI: torso (-0.097 0.22 0)
    # Midpoint between inferior angles of most caudal paints of the scapulae
  Marker LV1: torso (-0.074 0.113 0)
    # 1st lumbar certebrae
  Marker LV3: torso (-0.056 0.068 0)
    # 3rd lumbar certebrae
  Marker LV5: torso (-0.055 0.025 0)
    # 5th lumbar certebrae
  Marker L_SAE: torso (-0.03 0.44 -0.15)
    # Left shoulder
  Marker R_SAE: torso (-0.03 0.44 0.15)
    # Right shoulder
  Marker L_IAS: pelvis (0.02 0.03 -0.128)
    # Left anterior superior iliac spine
  Marker R_IAS: pelvis (0.02 0.03 0.128)
    # Right anterior superior iliac spine
  Marker L_IPS: pelvis (-0.156 0.04 -0.052)
    # Left posterior superior iliac spine
  Marker R_IPS: pelvis (-0.156 0.04 0.052)
    # Right posterior superior iliac spine
  Marker L_FTC: femur_l (0.003 -0.13 -0.08)
    # Lateral side of left greater trochanter, 1/3 from proximal end
  Marker L_FLE: femur_l (0 -0.404 -0.05)
    # Left femur lateral epicondyle
  Marker L_FME: femur_l (0 -0.404 0.05)
    # Left femur medial epicondyle
  Marker L_FAX: tibia_l (-0.008 -0.076 -0.062)
    # Left proximal tip of the head of the fibula
  Marker L_TTC: tibia_l (0.05 -0.083 0)
    # Most anterior border of the left tibial tuberosity
  Marker L_FAL: tibia_l (-0.005 -0.41 -0.053)
    # Left lateral prominence of the lateral malleolus
  Marker L_TAM: tibia_l (0.006 -0.3888 0.038)
    # Left medial prominence of the medial malleolus
  Marker L_FCC: calcn_l (-0.02 0.02 0.005)
    # Aspect of the left Achilles tendon insertion on the calcaneus
  Marker L_FM1: calcn_l (0.19 0.013 0.035)
  Marker L_FM2: calcn_l (0.176 0.012 -0.0025)
  Marker L_FM5: calcn_l (0.142 0.012 -0.045)
  Marker R_FTC: femur_r (0.003 -0.13 0.08)
    # Lateral side of right greater trochanter, 1/3 from proximal end
  Marker R_FLE: femur_r (0 -0.404 0.05)
    # Right femur lateral epicondyle
  Marker R_FME: femur_r (0 -0.404 -0.05)
    # Right femur medial epicondyle
  Marker R_FAX: tibia_r (-0.008 -0.076 0.062)
    # Right proximal tip of the head of the fibula
  Marker R_TTC: tibia_r (0.05 -0.083 0)
    # Most anterior border of the right tibial tuberosity
  Marker R_FAL: tibia_r (-0.005 -0.41 0.053)
    # Right lateral prominence of the lateral malleolus
  Marker R_TAM: tibia_r (0.006 -0.3888 -0.038)
    # Right medial prominence of the medial malleolus
  Marker R_FCC: calcn_r (-0.02 0.02 -0.005)
    # Aspect of the right Achilles tendon insertion on the calcaneus
  Marker R_FM1: calcn_r (0.19 0.013 -0.035)
    # Dorsal margin of the right first metatarsal head
  Marker R_FM2: calcn_r (0.176 0.012 0.0025)
    # Dorsal margin of the right second metatarsal head
  Marker R_FM5: calcn_r (0.142 0.012 0.045)
    # Dorsal margin of the right fifth metatarsal head
